<?xml version="1.0"?>

<!--
  nano-fs tuned copy of JSBSim's prop_75in2f.xml (flightsim/aircraft/c172p_tuned), 2026-10-06.
  Against the 1985/1981 C172P POH (docs/REFERENCES.md, docs/VALIDATION.md):
    C_POWER x 1.15 for J <= 0.45, blending linearly to x 1.0 at J >= 0.65
      (static RPM 2538 -> 2380, POH 2300-2420; full-throttle climb at 76 KCAS within the
      2700 RPM redline; cruise J ~0.70 unchanged, so the cruise checks are unchanged)
    C_THRUST x 1.15 for J <= 0.2, blending linearly to x 1.0 at J >= 0.45
      (keeps the takeoff acceleration: roll to 51 KIAS 884 ft, POH 892; climb 733 fpm, POH ~700)
    C_THRUST x 1.22 more for J <= 0.25, blending to x 1.0 at J >= 0.40 (2026-10-10): the line
      above compared the roll to 51 KCAS, but the POH's 51 KIAS lift-off is 55.7 KCAS
      (Figure 5-1); the takeoff roll is now 894 ft (POH 892) at a 55.1 KCAS lift-off, the
      climb at 76 KCAS (J ~0.47) unchanged. Static thrust about 584 lb (sea level, 2380 RPM;
      not checked against a source).
  The commented-out tables below are the original file's and are not used.
-->
<propeller name="Fixed-Pitch 75-inch Two-Blade Propeller (nano-fs tuned)">
  <ixx> 1.67 </ixx>
  <diameter unit="IN"> 75.0 </diameter>
  <numblades> 2 </numblades>
  <minpitch> 22 </minpitch>
  <maxpitch> 22 </maxpitch>

  <!--table name="C_THRUST" type="internal">
    <tableData>
      0.0   0.068
      0.1   0.068
      0.2   0.067
      0.3   0.066
      0.4   0.064
      0.5   0.061
      0.6   0.057
      0.7   0.050
      0.8   0.040
      0.9   0.029
      1.0   0.019
      1.1   0.008
      1.2   -0.001
      1.3   -0.008
      1.4   -0.019
      1.5   -0.029
      1.6   -0.040
      1.7   -0.050
      1.8   -0.057
      1.9   -0.061
      2.0   -0.064
      2.1   -0.066
      2.2   -0.067
      2.3   -0.068
      5.0   -0.068
    </tableData>
  </table-->

  <table name="C_THRUST" type="internal">
    <tableData>
      0.0   0.1024
      0.1   0.1024
      0.2   0.1010
      0.3   0.0888
      0.4   0.0711
      0.5   0.0660
      0.6   0.0620
      0.7   0.0550
      0.8   0.0450
      0.9   0.0340
      1.0   0.0240
      1.1   0.0130
      1.2   -0.0060
      1.3   -0.0130
      1.4   -0.0240
      1.5   -0.0340
      1.6   -0.0450
      1.7   -0.0550
      1.8   -0.0620
      1.9   -0.0660
      2.0   -0.0690
      2.1   -0.0710
      2.2   -0.0720
      2.3   -0.0730
      5.0   -0.0730
    </tableData>
  </table>

  <!--table name="C_POWER" type = "internal">
    <tableData>
      0.0   0.0580
      0.1   0.0620
      0.2   0.0600
      0.3   0.0580
      0.4   0.0520
      0.5   0.0450
      0.6   0.0421
      0.7   0.0389
      0.8   0.0346
      0.9   0.0280
      1.0   0.0202
      1.1   0.0111
      1.2   0.0075
      1.3   0.0111
      1.4   0.0202
      1.5   0.0280
      1.6   0.0346
      1.7   0.0389
      1.8   0.0421
      1.9   0.0436
      2.0   0.0445
      2.1   0.0445
      2.2   0.0442
      2.3   0.0431
      2.4   0.0424
      5.0   0.0413
    </tableData>
  </table-->

  <table name="C_POWER" type = "internal">
    <tableData>
      0.0   0.0759
      0.1   0.0805
      0.2   0.0805
      0.3   0.0759
      0.4   0.0690
      0.5   0.0590
      0.6   0.0520
      0.7   0.0469
      0.8   0.0426
      0.9   0.0360
      1.0   0.0282
      1.1   0.0191
      1.2   0.0155
      1.3   0.0191
      1.4   0.0282
      1.5   0.0360
      1.6   0.0426
      1.7   0.0469
      1.8   0.0501
      1.9   0.0516
      2.0   0.0525
      2.1   0.0525
      2.2   0.0522
      2.3   0.0511
      2.4   0.0504
      5.0   0.0493
    </tableData>
  </table>

<!-- thrust effects of helical tip Mach -->
<table name="CT_MACH" type="internal">
  <tableData>
    0.85   1.0
    1.05   0.8
  </tableData>
</table>

<!-- power-required effects of helical tip Mach -->
<table name="CP_MACH" type="internal">
  <tableData>
    0.85   1.0
    1.05   1.8
    2.00   1.4
  </tableData>
</table>

</propeller>
